// SBML level 3 version 1

model __main()

  // Compartments:
  compartment default_compartment = 1;

  // Species:
  species $Xo in default_compartment = 0;
  species A in default_compartment = 0;
  species B in default_compartment = 0;
  species C in default_compartment = 0;
  species E in default_compartment = 0;
  species D in default_compartment = 0;
  species $X1 in default_compartment = 0;
  species F in default_compartment = 0;
  species $X2 in default_compartment = 0;
  species $X3 in default_compartment = 0;

  // Parameters:
  v = 0;

  // Reactions:
  J1: $Xo => A; v;
  J2: A => B; v;
  J3: A => C; v;
  J4: B + E => 2 D; v;
  J5: $X1 => E; v;
  J6: B => C + F; v;
  J7: C => D; v;
  J8: D => $X2; v;
  J9: F => $X3; v;
end
